<?xml version="1.0"?>

<!---->


 <propeller name="Rotol-4-Blades">
  <ixx>44.2865</ixx>
  <diameter unit="IN">170.0</diameter>
  <numblades>4</numblades>
  <gearratio>2.11</gearratio>
  <minpitch>12</minpitch>
  <maxpitch>40</maxpitch>
  <minrpm>1058</minrpm>
  <maxrpm>1323</maxrpm>
  <table name="C_THRUST" type="internal">
   <tableData>
            000012	000015	000020	000025	000030	000035	000040
    0.0	0.0660	0.0760	0.0860	0.0960	0.1060	0.1160	0.1260
    0.1	0.0586	0.0706	0.0835	0.0960	0.1060	0.1160	0.1260
    0.2	0.0513	0.0642	0.0786	0.0960	0.1060	0.1160	0.1260
    0.3	0.0420	0.0562	0.0727	0.0960	0.1060	0.1160	0.1260
    0.4	0.0330	0.0471	0.0639	0.0896	0.1060	0.1160	0.1260
    0.5	0.0227	0.0375	0.0555	0.0821	0.1060	0.1160	0.1260
    0.6	0.0110	0.0268	0.0467	0.0736	0.1019	0.1160	0.1260
    0.7	-0.0027	0.0144	0.0368	0.0640	0.0939	0.1160	0.1260
    0.8	-0.0152	0.0027	0.0265	0.0555	0.0864	0.1115	0.1260
    1.0	-0.0312	-0.0161	0.0049	0.0336	0.0645	0.0986	0.1260
    1.2	-0.0522	-0.0348	-0.0098	0.0123	0.0426	0.0773	0.1211
    1.4	-0.0733	-0.0535	-0.0246	-0.0107	0.0184	0.0528	0.0980
    1.6	-0.0944	-0.0722	-0.0393	-0.0320	-0.0058	0.0290	0.0721
    1.8	-0.1155	-0.0910	-0.0540	-0.0533	-0.0288	0.0045	0.0490
    2.0	-0.1365	-0.1097	-0.0688	-0.0746	-0.0518	-0.0193	0.0245
    2.2	-0.1668	-0.1338	-0.0835	-0.0960	-0.0749	-0.0451	0.0000
    2.4	-0.2016	-0.1605	-0.0983	-0.1173	-0.0979	-0.0709	-0.0245
    2.6	-0.2291	-0.1873	-0.1228	-0.1440	-0.1238	-0.0999	-0.0560
    2.8	-0.2566	-0.2140	-0.1474	-0.1706	-0.1498	-0.1289	-0.0875
    3.0	-0.2841	-0.2408	-0.1720	-0.1973	-0.1757	-0.1579	-0.1190
    3.2	-0.3116	-0.2675	-0.1965	-0.2239	-0.2016	-0.1869	-0.1505
   </tableData>
  </table>

  <table name="C_POWER" type="internal">
   <tableData>
        000012	000015	000020	000025	000030	000035	000040
    0.0	0.0767	0.0867	0.1017	0.1167	0.1317	0.1467	0.1617
    0.1	0.0767	0.0867	0.1017	0.1140	0.1317	0.1436	0.1617
    0.2	0.0735	0.0853	0.1017	0.1122	0.1240	0.1423	0.1612
    0.3	0.0703	0.0838	0.1017	0.1095	0.1240	0.1374	0.1595
    0.4	0.0537	0.0752	0.0995	0.1086	0.1240	0.1342	0.1556
    0.5	0.0390	0.0650	0.0927	0.1086	0.1278	0.1311	0.1528
    0.6	0.0320	0.0578	0.0848	0.1077	0.1278	0.1249	0.1500
    0.7	0.0026	0.0405	0.0769	0.1015	0.1278	0.1249	0.1456
    0.8	-0.0185	0.0217	0.0588	0.0925	0.1240	0.1280	0.1556
    1.0	-0.0601	-0.0145	0.0249	0.0673	0.1085	0.1249	0.1556
    1.2	-0.1029	-0.0506	-0.0079	0.0314	0.0814	0.1093	0.1556
    1.4	-0.1458	-0.0867	-0.0407	-0.0045	0.0465	0.0874	0.1334
    1.6	-0.1886	-0.1228	-0.0735	-0.0404	0.0039	0.0562	0.1111
    1.8	-0.2302	-0.1590	-0.1074	-0.0853	-0.0465	0.0250	0.0861
    2.0	-0.2717	-0.1951	-0.1413	-0.1212	-0.0930	-0.0062	0.0556
    2.2	-0.3133	-0.2312	-0.1752	-0.1571	-0.1395	-0.0375	0.0222
    2.4	-0.3548	-0.2674	-0.2091	-0.1930	-0.1860	-0.0687	-0.0111
    2.6	-0.4060	-0.3107	-0.2486	-0.2334	-0.2324	-0.0999	-0.0445
    2.8	-0.4507	-0.3541	-0.2939	-0.2783	-0.2789	-0.1311	-0.0778
    3.0	-0.4955	-0.3975	-0.3391	-0.3232	-0.3254	-0.1623	-0.1111
    3.2	-0.5722	-0.4553	-0.3843	-0.3681	-0.3719	-0.1935	-0.1445
   </tableData>
  </table>


 </propeller>
