<?xml version="1.0"?>
<?xml-stylesheet type="text/xsl" href="http://jsbsim.sourceforge.net/JSBSim.xsl"?>
<fdm_config name="Nord-2502    from Aeromatic" version="2.0" release="ALPHA"
   xmlns:xsi="http://www.w3.org/2001/XMLSchema-instance"
   xsi:noNamespaceSchemaLocation="http://jsbsim.sourceforge.net/JSBSim.xsd">


 <fileheader>
  <author> Aeromatic v 0.9 </author>
  <filecreationdate> 09-06-2007 </filecreationdate>
  <version> 0.2 </version>
  <description> Nord 2502 Noratlas </description>
 </fileheader>


<metrics>
   <wingarea  unit="FT2"> 1087.27 </wingarea>
   <wingspan  unit="FT" >  110.24 </wingspan>
   <wing_incidence>          1.00 </wing_incidence>
   <chord     unit="FT" >    12.10 </chord>
   <htailarea unit="FT2">  177 </htailarea>
   <htailarm  unit="FT" >   42</htailarm>
   <vtailarea unit="FT2">  119.47</vtailarea>
   <vtailarm  unit="FT" >   42</vtailarm>

   <location name="AERORP" unit="IN">
     <x> 0.00 </x>
     <y>   0.00 </y>
     <z>   55.87874 </z>
   </location>
   <location name="EYEPOINT" unit="IN">
     <x>  60.55 </x>
     <y> -32.00 </y>
     <z>  80.00 </z>
   </location>
   <location name="VRP" unit="IN">
     <x>0</x>
     <y>0</y>
     <z>0</z>
   </location>
 </metrics>

 <mass_balance>
   <ixx unit="SLUG*FT2">    294010 </ixx>
   <iyy unit="SLUG*FT2">    141906 </iyy>
   <izz unit="SLUG*FT2">    433711 </izz>
   <ixy unit="SLUG*FT2">         0 </ixy>
   <ixz unit="SLUG*FT2">         0 </ixz>
   <iyz unit="SLUG*FT2">         0 </iyz>
   <emptywt unit="LBS" >     30429 </emptywt>
   <location name="CG" unit="IN">
     <x> 0.00 </x>
     <y>   0.00 </y>
     <z> 30.674094 </z>
   </location>
 </mass_balance>

 <ground_reactions>

  <contact type="BOGEY" name="NOSE">
   <location unit="IN">
     <x>-225.83858 </x>
     <y>   0.00 </y>
     <z>-95.404331 </z>
   </location>
   <static_friction>  0.80 </static_friction>
   <dynamic_friction> 0.50 </dynamic_friction>
   <rolling_friction> 0.02 </rolling_friction>
   <spring_coeff unit="LBS/FT">   15214    </spring_coeff> <!--aeromatic 15214.50  24343  -->
   <damping_coeff unit="LBS/FT/SEC">  5071 </damping_coeff> <!-- 5071  8114-->
   <max_steer unit="DEG"> 5.00 </max_steer>
   <brake_group>NONE</brake_group>
   <retractable>1</retractable>
 </contact>

  <contact type="BOGEY" name="LEFT_MAIN">
   <location unit="IN">
     <x> 25.275591</x>
     <y> -153.93504 </y>
     <z> -95.199606 </z>
   </location>
   <static_friction>  0.80 </static_friction>
   <dynamic_friction> 0.50 </dynamic_friction>
   <rolling_friction> 0.02 </rolling_friction>
   <spring_coeff unit="LBS/FT">      50715.00 </spring_coeff>
   <damping_coeff unit="LBS/FT/SEC"> 10143.00 </damping_coeff>
   <max_steer unit="DEG">0</max_steer>
   <brake_group>LEFT</brake_group>
   <retractable>1</retractable>
 </contact>

  <contact type="BOGEY" name="RIGHT_MAIN">
   <location unit="IN">
     <x> 25.275591</x>
     <y> 153.93504 </y>
     <z> -95.199606 </z>
   </location>
   <static_friction>  0.80 </static_friction>
   <dynamic_friction> 0.50 </dynamic_friction>
   <rolling_friction> 0.02 </rolling_friction>
   <spring_coeff unit="LBS/FT">      50715.00 </spring_coeff>
   <damping_coeff unit="LBS/FT/SEC"> 10143.00 </damping_coeff>
   <max_steer unit="DEG">0</max_steer>
   <brake_group>RIGHT</brake_group>
   <retractable>1</retractable>
 </contact>
    <contact type="BOGEY" name="W_LEFT">
            <location unit="IN">
            <x> 75.944882 </x>
            <y> -642.63386</y>
            <z> 66.322835 </z>
            </location>
            <static_friction> 0.2 </static_friction>
            <dynamic_friction> 0.2 </dynamic_friction>
            <rolling_friction> 0.2 </rolling_friction>
            <spring_coeff unit="LBS/FT"> 100 </spring_coeff>
            <damping_coeff unit="LBS/FT/SEC"> 20000 </damping_coeff>
            <max_steer unit="DEG"> 0.0 </max_steer>
            <brake_group> NONE </brake_group>
            <retractable>0</retractable>
        </contact>
        <contact type="BOGEY" name="W_RIGHT">
            <location unit="IN">
            <x> 75.944882 </x>
            <y> 642.63386</y>
            <z> 66.322835 </z>
            </location>
            <static_friction> 0.2 </static_friction>
            <dynamic_friction> 0.2 </dynamic_friction>
            <rolling_friction> 0.2 </rolling_friction>
            <spring_coeff unit="LBS/FT"> 100 </spring_coeff>
            <damping_coeff unit="LBS/FT/SEC"> 20000 </damping_coeff>
            <max_steer unit="DEG"> 0.0 </max_steer>
            <brake_group> NONE </brake_group>
            <retractable>0</retractable>
        </contact>
        <contact type="BOGEY" name="BELLY">
            <location unit="IN">
                <x>-85</x>
                <y> 0 </y>
                <z> -61.968504 </z>
            </location>
            <static_friction> 0.2 </static_friction>
            <dynamic_friction> 0.2 </dynamic_friction>
            <rolling_friction> 0.2 </rolling_friction>
            <spring_coeff unit="LBS/FT"> 100000 </spring_coeff>
            <damping_coeff unit="LBS/FT/SEC"> 3000 </damping_coeff>
            <max_steer unit="DEG"> 0.0 </max_steer>
            <brake_group> NONE </brake_group>
            <retractable>0</retractable>
        </contact>
        <contact type="BOGEY" name="NOSE">
            <location unit="IN">
                <x> -264.96063 </x>
                <y> 0 </y>
                <z> 23.599409 </z>
            </location>
            <static_friction> 0.2 </static_friction>
            <dynamic_friction> 0.2 </dynamic_friction>
            <rolling_friction> 0.2 </rolling_friction>
            <spring_coeff unit="LBS/FT"> 100000 </spring_coeff>
            <damping_coeff unit="LBS/FT/SEC"> 2000 </damping_coeff>
            <max_steer unit="DEG"> 0.0 </max_steer>
            <brake_group> NONE </brake_group>
            <retractable>0</retractable>
        </contact>
        <contact type="BOGEY" name="TAIL">
            <location unit="IN">
                <x> 495.98819</x>
                <y> 0 </y>
                <z> 6.9980315</z>
            </location>
            <static_friction> 0.2 </static_friction>
            <dynamic_friction> 0.2 </dynamic_friction>
            <rolling_friction> 0.2 </rolling_friction>
            <spring_coeff unit="LBS/FT"> 100000 </spring_coeff>
            <damping_coeff unit="LBS/FT/SEC"> 2000 </damping_coeff>
            <max_steer unit="DEG"> 0.0 </max_steer>
            <brake_group> NONE </brake_group>
            <retractable>0</retractable>
        </contact>

 </ground_reactions>

 <propulsion>

   <engine file="Bristol-739">
    <location unit="IN">
      <x> -112.35748</x>
      <y> 165.24724 </y>
      <z> 38.772047 </z>
    </location>
    <orient unit="DEG">
      <pitch> 0.00 </pitch>
      <roll>   0.00 </roll>
      <yaw>   0.00 </yaw>
    </orient>
    <feed>0</feed>
     <feed>1</feed>
    <thruster file="Rotol">
     <location unit="IN">
       <x> -112.35748 </x>
       <y> 165.24724 </y>
       <z> 38.772047 </z>
     </location>
     <orient unit="DEG">
       <pitch> 0.00 </pitch>
       <roll>   0.00 </roll>
       <yaw>   0.00 </yaw>
     </orient>
     <sense> 1 </sense>
    <p_factor> 60</p_factor>
    </thruster>
  </engine>

   <engine file="Bristol-739">
    <location unit="IN">
      <x> -112.35748 </x>
      <y> -165.24724 </y>
      <z> 38.772047 </z>
    </location>
    <orient unit="DEG">
      <pitch> 0.00 </pitch>
      <roll>   0.00 </roll>
      <yaw>   0.00 </yaw>
    </orient>
     <feed>0</feed>
    <feed>1</feed>
    <thruster file="Rotol">
     <location unit="IN">
       <x> -112.35748 </x>
       <y> -165.24724 </y>
       <z> 38.772047 </z>
     </location>
     <orient unit="DEG">
       <pitch> 0.00 </pitch>
       <roll>   0.00 </roll>
       <yaw>   0.00 </yaw>
     </orient>
     <sense> 1 </sense>
     <p_factor> 60</p_factor>
    </thruster>
  </engine>

   <engine file="MarboreII">
    <location unit="IN">
      <x> 75.944882 </x>
      <y> 642.63386</y>
      <z> 66.322835 </z>
    </location>
    <orient unit="DEG">
      <pitch> 0.00 </pitch>
      <roll>   0.00 </roll>
      <yaw>   0.00 </yaw>
    </orient>
    <feed>2</feed>
     <feed>3</feed>
    <thruster file="direct">
     <location unit="IN">
       <x> 75.944882 </x>
       <y> 642.63386 </y>
       <z> 66.322835 </z>
     </location>
     <orient unit="DEG">
       <pitch> 0.00 </pitch>
       <roll>   0.00 </roll>
       <yaw>   0.00 </yaw>
     </orient>
    </thruster>
  </engine>

   <engine file="MarboreII">
    <location unit="IN">
      <x> 75.944882 </x>
      <y> -642.63386 </y>
      <z> 66.322835 </z>
    </location>
    <orient unit="DEG">
      <pitch> 0.00 </pitch>
      <roll>   0.00 </roll>
      <yaw>   0.00 </yaw>
    </orient>
     <feed>2</feed>
    <feed>3</feed>
    <thruster file="direct">
     <location unit="IN">
       <x> 75.944882 </x>
       <y> -642.63386 </y>
       <z> 66.322835 </z>
     </location>
     <orient unit="DEG">
       <pitch> 0.00 </pitch>
       <roll>   0.00 </roll>
       <yaw>   0.00 </yaw>
     </orient>
    </thruster>
  </engine>

  <tank type="FUEL" number="1">
     <location unit="IN">
       <x> 0.0 </x>
       <y>   0.00 </y>
       <z> -21.63 </z>
     </location>
     <capacity unit="LBS"> 8000 </capacity>
     <contents unit="LBS"> 4000 </contents>
  </tank>

  <tank type="FUEL" number="2">
     <location unit="IN">
       <x> 0.0 </x>
       <y>   0.00 </y>
       <z> -21.63 </z>
     </location>
     <capacity unit="LBS"> 8000 </capacity>
     <contents unit="LBS"> 4000 </contents>
  </tank>

  <tank type="FUEL" number="3">
     <location unit="IN">
       <x> 0.0 </x>
       <y>   0.00 </y>
       <z> -21.63 </z>
     </location>
     <capacity unit="LBS"> 1000 </capacity>
     <contents unit="LBS"> 500 </contents>
  </tank>

  <tank type="FUEL" number="4">
     <location unit="IN">
       <x> 0.0 </x>
       <y>   0.00 </y>
       <z> -21.63 </z>
     </location>
     <capacity unit="LBS"> 1000</capacity>
     <contents unit="LBS"> 500 </contents>
  </tank>


 </propulsion>

 <flight_control name="FCS: Nord 2502">

  <property>fcs/ar-latg-porte-cmd-norm</property>
  <property>fcs/ar-latd-porte-cmd-norm</property>
  <property>fcs/ar-g-porte-cmd-norm</property>
  <property>fcs/ar-d-porte-cmd-norm</property>
  <property>fcs/rampe-cmd-norm</property>
  <property>/controls/engines/engine[4]/throttle</property>
    <property>/sim/model/controls/supercharger</property>

  <channel name="Pitch">
   <summer name="Pitch Trim Sum">
      <input>fcs/elevator-cmd-norm</input>
      <input>fcs/pitch-trim-cmd-norm</input>
      <clipto>
        <min> -1 </min>
        <max>  1 </max>
      </clipto>
      <output>fcs/elevator-pos-norm</output>
   </summer>

   <aerosurface_scale name="Elevator Control">
      <input>fcs/pitch-trim-sum</input>
      <range>
        <min> -0.35 </min>
        <max>  0.30 </max>
      </range>
      <output>fcs/elevator-pos-rad</output>
   </aerosurface_scale>

  </channel>

  <channel name="Roll">
   <summer name="Roll Trim Sum">
      <input>fcs/aileron-cmd-norm</input>
      <input>fcs/roll-trim-cmd-norm</input>
      <clipto>
        <min> -1 </min>
        <max>  1 </max>
      </clipto>
   </summer>

   <aerosurface_scale name="Left Aileron Control">
      <input>fcs/roll-trim-sum</input>
      <range>
        <min> -0.20 </min>
        <max>  0.20 </max>
      </range>
      <output>fcs/left-aileron-pos-rad</output>
   </aerosurface_scale>

   <aerosurface_scale name="Right Aileron Control">
      <input>fcs/roll-trim-sum</input>
      <range>
        <min> -0.20 </min>
        <max>  0.20 </max>
      </range>
      <output>fcs/right-aileron-pos-rad</output>
   </aerosurface_scale>

  </channel>

  <channel name="Yaw">
   <summer name="Rudder Command Sum">
      <input>fcs/rudder-cmd-norm</input>
      <input>fcs/yaw-trim-cmd-norm</input>
      <limit>
        <min> -0.27 </min>
        <max>  0.27 </max>
      </limit>
   </summer>

   <aerosurface_scale name="Rudder Control">
      <input>fcs/rudder-command-sum</input>
      <range>
        <min> -0.35 </min>
        <max>  0.35 </max>
      </range>
      <output>fcs/rudder-pos-rad</output>
   </aerosurface_scale>

  </channel>

  <channel name="Flaps">
   <kinematic name="Flaps Control">
     <input>fcs/flap-cmd-norm</input>
     <traverse>
       <setting>
          <position>  0 </position>
          <time>      0 </time>
       </setting>
       <setting>
          <position> 10 </position>
          <time>      6 </time>
       </setting>
       <setting>
          <position> 20 </position>
          <time>      6 </time>
       </setting>
       <setting>
          <position> 30 </position>
          <time>      6 </time>
       </setting>
       <setting>
          <position> 40 </position>
          <time>      6 </time>
       </setting>
     </traverse>
     <output>fcs/flap-pos-deg</output>
   </kinematic>


   <aerosurface_scale name="Flap Position Normalizer">
            <input>fcs/flaps-control</input>
            <domain>
                    <min>0</min>
                    <max>40</max>
            </domain>
            <range>
                    <min>0</min>
                    <max>1</max>
            </range>
            <output>fcs/flap-pos-norm</output>
    </aerosurface_scale>

  </channel>

  <channel name="Landing Gear">
   <kinematic name="Gear Control">
     <input>gear/gear-cmd-norm</input>
     <traverse>
       <setting>
          <position> 0 </position>
          <time>     0 </time>
       </setting>
       <setting>
          <position> 1 </position>
          <time>     5 </time>
       </setting>
     </traverse>
     <output>gear/gear-pos-norm</output>
   </kinematic>

  </channel>

  <channel name="Speedbrake">
   <kinematic name="Speedbrake Control">
     <input>fcs/speedbrake-cmd-norm</input>
     <traverse>
       <setting>
          <position> 0 </position>
          <time>     0 </time>
       </setting>
       <setting>
          <position> 1 </position>
          <time>     1 </time>
       </setting>
     </traverse>
     <output>fcs/speedbrake-pos-norm</output>
   </kinematic>

  </channel>

  <channel name="Throttle">

        <scheduled_gain name="Throttle0 Cmd Norm">
              <input>/controls/engines/engine[0]/condition</input>
            <table>
                <independentVar>/controls/engines/engine[4]/throttle</independentVar>
                <tableData>
                    0.0	0.0
                    0.8	1
                    1           1
                </tableData>
            </table>
        </scheduled_gain>

        <scheduled_gain name="Throttle2 Cmd Norm">
            <input>/controls/engines/engine[2]/condition</input>
            <table>
                <independentVar>/controls/engines/engine[4]/throttle</independentVar>
                <tableData>
                    0.0	0.0
                    0.8	0.0
                    1           1
                </tableData>
            </table>
            <output>/controls/engines/engine[2]/throttle</output>
        </scheduled_gain>

        <summer name="Throttle0">
            <input>fcs/throttle0-cmd-norm</input>
            <clipto>
                <min>0.2</min>
                <max>1.0</max>
            </clipto>
            <output>/controls/engines/engine[0]/throttle</output>
        </summer>

        <scheduled_gain name="Throttle1 Cmd Norm">
              <input>/controls/engines/engine[1]/condition</input>
            <table>
                <independentVar>/controls/engines/engine[4]/throttle</independentVar>
                <tableData>
                    0.0	0.0
                    0.8	1
                    1           1
                </tableData>
            </table>
        </scheduled_gain>

        <scheduled_gain name="Throttle3 Cmd Norm">
            <input>/controls/engines/engine[3]/condition</input>
            <table>
                <independentVar>/controls/engines/engine[4]/throttle</independentVar>
                <tableData>
                    0.0	0.0
                    0.8	0.0
                    1           1
                </tableData>
            </table>
            <output>/controls/engines/engine[3]/throttle</output>
        </scheduled_gain>

        <summer name="Throttle1">
            <input>fcs/throttle1-cmd-norm</input>
            <clipto>
                <min>0.2</min>
                <max>1.0</max>
            </clipto>
            <output>/controls/engines/engine[1]/throttle</output>
        </summer>

        <!--<switch name="Supercharger Engage">
                <default value="0"/>
                <test  logic="AND" value="1">
                   /controls/engines/engine[0]/throttle  gt 0.99
                </test>
        </switch>-->

        <!--<pure_gain name="Supercarger Control">
            <input>fcs/supercharger-engage</input>
            <gain>1</gain>
            <output>/sim/model/controls/supercharger</output>
        </pure_gain>-->


        <!--<kinematic name="Supercharger Control">
            <input>fcs/supercharger-engage</input>
            <traverse>
            <setting>
                <position> 0 </position>
                <time>     0 </time>
            </setting>
            <setting>
                <position> 1 </position>
                <time>     2 </time>
            </setting>
            </traverse>
            <output>/sim/model/controls/supercharger</output>
        </kinematic>-->


        <!--<kinematic name="Supercharger  Control">
            <input>fcs/supercharger-run</input>
            <traverse>
            <setting>
                <position> 1 </position>
                <time>     0 </time>
            </setting>
            <setting>
                <position> 1 </position>
                <time>     120 </time>
            </setting>
            <setting>
                <position> 0.98 </position>
                <time>     121 </time>
            </setting>
            </traverse>
            <output>fcs/throttle0-cmd-norm</output>
        </kinematic>-->


    <!--<pure_gain name="Throttle2">
        <input>fcs/throttle-cmd-norm</input>
        <gain>1.2</gain>
        <output>fcs/throttle-pos-norm</output>
    </pure_gain>-->

    </channel>


    <channel name="External">
            <kinematic name="Ar Lat GPorte">
            <input>fcs/ar-latg-porte-cmd-norm</input>
            <traverse>
                    <setting>
                            <position>0</position>
                            <time>0</time>
                    </setting>
                    <setting>
                            <position>1</position>
                            <time>5</time>
                    </setting>
            </traverse>
            <output>fcs/ar-latg-porte-pos-norm</output>
            </kinematic>


            <kinematic name="Ar Lat DPorte">
            <input>fcs/ar-latd-porte-cmd-norm</input>
            <traverse>
                    <setting>
                            <position>0</position>
                            <time>0</time>
                    </setting>
                    <setting>
                            <position>1</position>
                            <time>5</time>
                    </setting>
            </traverse>
            <output>fcs/ar-latd-porte-pos-norm</output>
            </kinematic>

            <kinematic name="Ar GPorte">
            <input>fcs/ar-g-porte-cmd-norm</input>
            <traverse>
                    <setting>
                            <position>0</position>
                            <time>0</time>
                    </setting>
                    <setting>
                            <position>1</position>
                            <time>8</time>
                    </setting>
            </traverse>
            <output>fcs/ar-g-porte-pos-norm</output>
            </kinematic>

            <kinematic name="Ar DPorte">
            <input>fcs/ar-d-porte-cmd-norm</input>
            <traverse>
                    <setting>
                            <position>0</position>
                            <time>0</time>
                    </setting>
                    <setting>
                            <position>1</position>
                            <time>8</time>
                    </setting>
            </traverse>
            <output>fcs/ar-d-porte-pos-norm</output>
            </kinematic>

            <kinematic name="Rampe">
            <input>fcs/rampe-cmd-norm</input>
            <traverse>
                    <setting>
                            <position>0</position>
                            <time>0</time>
                    </setting>
                    <setting>
                            <position>1</position>
                            <time>10</time>
                    </setting>
            </traverse>
            <output>fcs/rampe-pos-norm</output>
            </kinematic>

            <!--<switch name="Ar Porte">
                <default value="0"/>
                <test  logic="AND" value="1">
                    /controls/gear/brake-parking == 1
                    velocities/vc-kts lt 10
                </test>
            </switch>

            combinaison des valeurs switch et commande de porte
            si = 1 les portes ne s'ouvrent pas si =2 les portes s'ouuvrent
            prevoir un schedule gain   pour faire 0=0; 1=0 ; 2=1; de Ar Dporte-Commnand vers ar-d-porte-pos-norm

             <summer name="Ar Dporte-Commnand">
                <input>fcs/ar-porte</input>
                <input>fcs/ar-d-porte-cmd-norm</input>
                <clipto>
                    <min> -2 </min>
                    <max>  2 </max>
                </clipto>
             </summer>-->


            <switch name="Av Latg Porte Cmd Norm">
                <default value="0"/>
                <test  logic="AND" value="1">
                    /controls/gear/brake-parking == 1
                    velocities/vc-kts lt 10
                </test>
            </switch>

            <kinematic name="Av Lat GPorte">
            <input>fcs/av-latg-porte-cmd-norm</input>
            <traverse>
                    <setting>
                            <position>0</position>
                            <time>0</time>
                    </setting>
                    <setting>
                            <position>1</position>
                            <time>7</time>
                    </setting>
            </traverse>
            <output>fcs/av-latg-porte-pos-norm</output>
            </kinematic>


    </channel>

 </flight_control>

 <aerodynamics>

     <function name="aero/function/kCLge">
            <description>Change_in_lift_due_to_ground_effect</description>
            <product>
                  <table>
                      <independentVar>aero/h_b-mac-ft</independentVar>
                      <tableData>
                          0.0000	1.2000
                          0.1000	1.1500
                          0.1500	1.0900
                          0.2000	1.0200
                          1.1000	1.0000
                      </tableData>
                  </table>
            </product>
        </function>


  <axis name="LIFT">


    <function name="aero/coefficient/CLalpha">
      <description>Lift_due_to_alpha</description>
      <product>
          <property>aero/qbar-psf</property>
          <property>metrics/Sw-sqft</property>
          <property>aero/function/kCLge</property>
          <table>
            <independentVar lookup="row">aero/alpha-rad</independentVar>
            <tableData>
              -0.20 -0.680
               0.00 0.200
             0.23    1.400
               0.60 0.800
            </tableData>
          </table>
      </product>
    </function>

    <function name="aero/coefficient/dCLflap">
       <description>Delta_Lift_due_to_flaps</description>
       <product>
           <property>aero/qbar-psf</property>
           <property>metrics/Sw-sqft</property>
           <property>fcs/flap-pos-deg</property>
           <value> 0.07000 </value>
       </product>
    </function>

    <!--<function name="aero/coefficient/dCLsb">
       <description>Delta_Lift_due_to_speedbrake</description>
       <product>
           <property>aero/qbar-psf</property>
           <property>metrics/Sw-sqft</property>
           <property>fcs/speedbrake-pos-norm</property>
           <value>-0.08</value>
       </product>
    </function>-->

    <function name="aero/coefficient/CLde">
       <description>Lift_due_to_Elevator_Deflection</description>
       <product>
           <property>aero/qbar-psf</property>
           <property>metrics/Sw-sqft</property>
           <property>fcs/elevator-pos-rad</property>
           <value>0.2</value>
       </product>
    </function>

  </axis>

  <axis name="DRAG">

    <function name="aero/coefficient/CD0">
       <description>Drag_at_zero_lift</description>
       <product>
          <property>aero/qbar-psf</property>
          <property>metrics/Sw-sqft</property>
          <table>
            <independentVar lookup="row">aero/alpha-rad</independentVar>
            <tableData>
             -1.57       1.500
             -0.26    0.022
              0.00    0.017
              0.26    0.022
              1.57       1.500
            </tableData>
          </table>
       </product>
    </function>

    <function name="aero/coefficient/CDi">
       <description>Induced_drag</description>
         <product>
           <property>aero/qbar-psf</property>
           <property>metrics/Sw-sqft</property>
           <property>aero/cl-squared</property>
           <value>0.034</value>
         </product>
    </function>

    <function name="aero/coefficient/CDmach">
       <description>Drag_due_to_mach</description>
        <product>
          <property>aero/qbar-psf</property>
          <property>metrics/Sw-sqft</property>
          <table>
            <independentVar lookup="row">velocities/mach</independentVar>
            <tableData>
                0.00      0.000
                0.79      0.000
                1.10      0.023
                1.80      0.015
            </tableData>
          </table>
        </product>
    </function>

    <function name="aero/coefficient/CDflap">
       <description>Drag_due_to_flaps</description>
         <product>
           <property>aero/qbar-psf</property>
           <property>metrics/Sw-sqft</property>
           <property>fcs/flap-pos-deg</property>
           <value> 0.000975</value>
         </product>
    </function>

    <function name="aero/coefficient/CDgear">
       <description>Drag_due_to_gear</description>
         <product>
           <property>aero/qbar-psf</property>
           <property>metrics/Sw-sqft</property>
           <property>gear/gear-pos-norm</property>
           <value>0.011</value>
         </product>
    </function>

    <!--<function name="aero/coefficient/CDsb">
       <description>Drag_due_to_speedbrakes</description>
         <product>
           <property>aero/qbar-psf</property>
           <property>metrics/Sw-sqft</property>
           <property>fcs/speedbrake-pos-norm</property>
           <value>0.017</value>
         </product>
    </function>-->

    <function name="aero/coefficient/CDbeta">
       <description>Drag_due_to_sideslip</description>
       <product>
          <property>aero/qbar-psf</property>
          <property>metrics/Sw-sqft</property>
          <table>
            <independentVar lookup="row">aero/beta-rad</independentVar>
            <tableData>
              -1.57       1.230
              -0.26    0.050
               0.00       0.000
               0.26    0.050
               1.57       1.230
            </tableData>
          </table>
       </product>
    </function>

    <function name="aero/coefficient/CDde">
       <description>Drag_due_to_Elevator_Deflection</description>
       <product>
           <property>aero/qbar-psf</property>
           <property>metrics/Sw-sqft</property>
           <property>fcs/elevator-pos-norm</property>
           <value>0.04</value>
       </product>
    </function>

  </axis>

  <axis name="SIDE">

    <function name="aero/coefficient/CYb">
       <description>Side_force_due_to_beta</description>
       <product>
           <property>aero/qbar-psf</property>
           <property>metrics/Sw-sqft</property>
           <property>aero/beta-rad</property>
           <value>-1</value>
       </product>
    </function>

  </axis>

  <axis name="ROLL">

    <function name="aero/coefficient/Clb">
       <description>Roll_moment_due_to_beta</description>
       <product>
           <property>aero/qbar-psf</property>
           <property>metrics/Sw-sqft</property>
           <property>metrics/bw-ft</property>
           <property>aero/beta-rad</property>
           <value>-0.1</value>
       </product>
    </function>

    <function name="aero/coefficient/Clp">
       <description>Roll_moment_due_to_roll_rate</description>
       <product>
           <property>aero/qbar-psf</property>
           <property>metrics/Sw-sqft</property>
           <property>metrics/bw-ft</property>
           <property>aero/bi2vel</property>
           <property>velocities/p-aero-rad_sec</property>
           <value>-0.4</value>
       </product>
    </function>

    <function name="aero/coefficient/Clr">
       <description>Roll_moment_due_to_yaw_rate</description>
       <product>
           <property>aero/qbar-psf</property>
           <property>metrics/Sw-sqft</property>
           <property>metrics/bw-ft</property>
           <property>aero/bi2vel</property>
           <property>velocities/r-aero-rad_sec</property>
           <value>0.15</value>
       </product>
    </function>

    <function name="aero/coefficient/Clda">
       <description>Roll_moment_due_to_aileron</description>
       <product>
          <property>aero/qbar-psf</property>
          <property>metrics/Sw-sqft</property>
          <property>metrics/bw-ft</property>
          <property>fcs/left-aileron-pos-rad</property>
          <table>
            <independentVar lookup="row">velocities/mach</independentVar>
            <tableData>
              0.0    0.100
              2.0    0.033
            </tableData>
          </table>
       </product>
    </function>

    <function name="aero/coefficient/Cldr">
       <description>Roll_moment_due_to_rudder</description>
       <product>
           <property>aero/qbar-psf</property>
           <property>metrics/Sw-sqft</property>
           <property>metrics/bw-ft</property>
           <property>fcs/rudder-pos-rad</property>
           <value>0.01</value>
       </product>
    </function>

  </axis>

  <axis name="PITCH">

    <function name="aero/coefficient/Cmalpha">
       <description>Pitch_moment_due_to_alpha</description>
       <product>
           <property>aero/qbar-psf</property>
           <property>metrics/Sw-sqft</property>
           <property>metrics/cbarw-ft</property>
           <property>aero/alpha-rad</property>
           <value>-0.7</value>
       </product>
    </function>

    <function name="aero/coefficient/Cmde">
       <description>Pitch_moment_due_to_elevator</description>
       <product>
          <property>aero/qbar-psf</property>
          <property>metrics/Sw-sqft</property>
          <property>metrics/cbarw-ft</property>
          <property>fcs/elevator-pos-rad</property>
          <table>
            <independentVar lookup="row">velocities/mach</independentVar>
            <tableData>
              0.0     -1.300
              2.0     -0.325
            </tableData>
          </table>
       </product>
    </function>

    <!--<function name="aero/coefficient/Cmdf">
       <description>Pitch_moment_due_to_flap</description>
       <product>
          <property>aero/qbar-psf</property>
          <property>metrics/Sw-sqft</property>
          <property>metrics/cbarw-ft</property>
          <property>fcs/flap-pos-deg</property>
          <table>
            <independentVar lookup="row">velocities/mach</independentVar>
            <tableData>
              0.0     0
              2.0     0.001
            </tableData>
          </table>
       </product>
    </function>-->


    <function name="aero/coefficient/Cmq">
       <description>Pitch_moment_due_to_pitch_rate</description>
       <product>
           <property>aero/qbar-psf</property>
           <property>metrics/Sw-sqft</property>
           <property>metrics/cbarw-ft</property>
           <property>aero/ci2vel</property>
           <property>velocities/q-aero-rad_sec</property>
           <value>-21</value>
       </product>
    </function>

    <function name="aero/coefficient/Cmadot">
       <description>Pitch_moment_due_to_alpha_rate</description>
       <product>
           <property>aero/qbar-psf</property>
           <property>metrics/Sw-sqft</property>
           <property>metrics/cbarw-ft</property>
           <property>aero/ci2vel</property>
           <property>aero/alphadot-rad_sec</property>
           <value>-4</value>
       </product>
    </function>

  </axis>

  <axis name="YAW">

    <function name="aero/coefficient/Cnb">
       <description>Yaw_moment_due_to_beta</description>
       <product>
           <property>aero/qbar-psf</property>
           <property>metrics/Sw-sqft</property>
           <property>metrics/bw-ft</property>
           <property>aero/beta-rad</property>
           <value>0.12</value>
       </product>
    </function>

    <function name="aero/coefficient/Cnr">
       <description>Yaw_moment_due_to_yaw_rate</description>
       <product>
           <property>aero/qbar-psf</property>
           <property>metrics/Sw-sqft</property>
           <property>metrics/bw-ft</property>
           <property>aero/bi2vel</property>
           <property>velocities/r-aero-rad_sec</property>
           <value>-0.15</value>
       </product>
    </function>

    <function name="aero/coefficient/Cndr">
       <description>Yaw_moment_due_to_rudder</description>
       <product>
           <property>aero/qbar-psf</property>
           <property>metrics/Sw-sqft</property>
           <property>metrics/bw-ft</property>
           <property>fcs/rudder-pos-rad</property>
           <value>-0.1</value>
       </product>
    </function>

    <function name="aero/coefficient/Cnda">
       <description>Adverse_yaw</description>
       <product>
           <property>aero/qbar-psf</property>
           <property>metrics/Sw-sqft</property>
           <property>metrics/bw-ft</property>
           <property>fcs/left-aileron-pos-rad</property>
           <value>0</value>
       </product>
    </function>

  </axis>

 </aerodynamics>

</fdm_config>
